** Calculix structure data file generated from OpenVSP 3.36.0
** WingGeom_Struct0
** Num_Nodes:       62631
** Num_Els:         50368
** Num_Tris:        50368
** Num_Quads:       0
** Num_Beams:       0
** Node_Offset:     0
** Element_Offset:  0

** Fixed Point: FixPoint1_XYZ WingGeom_Struct0
*NODE, NSET=NFixPoint1_XYZ_WingGeom_Struct0
1,0.281400,0.000000,-0.023529

** Fixed Point: FixPoint2_Y WingGeom_Struct0
*NODE, NSET=NFixPoint2_Y_WingGeom_Struct0
2,0.281400,0.000000,0.096550

** Fixed Point: FixPoint3_YZ WingGeom_Struct0
*NODE, NSET=NFixPoint3_YZ_WingGeom_Struct0
3,0.365000,0.000000,-0.019471

** Skin WingGeom_Struct0
*NODE, NSET=NSkin_WingGeom_Struct0
281,0.003631,1.292080,-0.007417
282,0.000000,1.294114,0.000000
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
** RibArray WingGeom_Struct0
*NODE, NSET=NRibArray_WingGeom_Struct0
41179,0.100298,0.100000,0.054221
41180,0.103421,0.100000,0.061076
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
** Spar_Front WingGeom_Struct0
*NODE, NSET=NSpar_Front_WingGeom_Struct0
55626,0.281400,0.479203,0.001952
55627,0.281400,0.479601,-0.010788
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
** Spar_Rear WingGeom_Struct0
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
** Skin WingGeom_Struct0
*ELEMENT, TYPE=S6, ELSET=ESkin_WingGeom_Struct0_0
2,280,281,282,283,284,285
3,298,299,275,300,301,302
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
** RibArray WingGeom_Struct0
*ELEMENT, TYPE=S6, ELSET=ERibArray_WingGeom_Struct0_0
16630,23405,37915,41179,37917,41180,41181
16631,41182,41183,41184,41185,41186,41187
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
*ELEMENT, TYPE=S6, ELSET=ERibArray_WingGeom_Struct0_1
17200,42306,3963,12380,42307,12381,42308
17201,5612,6563,42309,6596,42310,42311
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
*ELEMENT, TYPE=S6, ELSET=ERibArray_WingGeom_Struct0_2
17760,22357,20384,43413,25943,43414,43415
17761,43416,1456,1458,43417,1461,43418
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
*ELEMENT, TYPE=S6, ELSET=ERibArray_WingGeom_Struct0_3
18306,44492,44493,44494,44495,44496,44497
18307,203,44498,44499,44500,44501,44502
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
*ELEMENT, TYPE=S6, ELSET=ERibArray_WingGeom_Struct0_4
18878,45623,45624,45625,45626,45627,45628
18879,45629,45630,45631,45632,45633,45634
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
*ELEMENT, TYPE=S6, ELSET=ERibArray_WingGeom_Struct0_5
19438,46730,46731,46732,46733,46734,46735
19439,46736,46730,46732,46737,46735,46738
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
*ELEMENT, TYPE=S6, ELSET=ERibArray_WingGeom_Struct0_6
19988,1469,47817,1468,47818,47819,1471
19989,47820,5924,5926,47821,5929,47822
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
*ELEMENT, TYPE=S6, ELSET=ERibArray_WingGeom_Struct0_7
20544,48916,48917,48918,48919,48920,48921
20545,48922,48923,48924,48925,48926,48927
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
*ELEMENT, TYPE=S6, ELSET=ERibArray_WingGeom_Struct0_8
21120,50055,50056,50057,50058,50059,50060
21121,813,50061,50062,50063,50064,50065
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
*ELEMENT, TYPE=S6, ELSET=ERibArray_WingGeom_Struct0_9
21690,2021,1605,51182,3667,51183,51184
21691,51185,51186,51187,51188,51189,51190
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
*ELEMENT, TYPE=S6, ELSET=ERibArray_WingGeom_Struct0_10
22260,19251,22997,52309,25043,52310,52311
22261,900,52312,52313,52314,52315,52316
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
*ELEMENT, TYPE=S6, ELSET=ERibArray_WingGeom_Struct0_11
22804,53384,53385,53386,53387,53388,53389
22805,1423,1424,53390,1426,53391,53392
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
*ELEMENT, TYPE=S6, ELSET=ERibArray_WingGeom_Struct0_12
23364,32875,18455,54491,32876,54492,54493
23365,54494,54495,18457,54496,54497,54498
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
** Spar_Front WingGeom_Struct0
*ELEMENT, TYPE=S6, ELSET=ESpar_Front_WingGeom_Struct0_0
23938,343,55626,43462,55627,55628,55629
23939,55630,55631,1,55632,55633,55634
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
** Spar_Rear WingGeom_Struct0
*ELEMENT, TYPE=S6, ELSET=ESpar_Rear_WingGeom_Struct0_0
25839,59020,59021,3,59022,59023,59024
25840,80,41240,76,59025,41241,82
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

*ELEMENT, TYPE=S6, ELSET=ESpar_Upper_WingGeom_Struct0_0
27838,17381,17382,17383,17384,17385,17386
27839,17393,17394,17395,17396,17397,17398
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

*ELEMENT, TYPE=S6, ELSET=ESpar_Lower_WingGeom_Struct0_0
29089,7,8,9,10,11,12
29090,19,20,21,22,23,24
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

*ELEMENT, TYPE=S6, ELSET=ETE_CAP_UPPER_WingGeom_Struct0_0
30345,17855,17856,17857,17858,17859,17860
30346,14,17855,15340,17861,17862,15342
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

*ELEMENT, TYPE=S6, ELSET=ETE_CAP_LOWER_WingGeom_Struct0_0
30908,13,14,15,16,17,18
30909,15,31,32,33,34,35
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
*BOUNDARY
1,1
1,2
1,3
2,2
3,2
3,3

** Properties WingGeom_Struct0

*SHELL SECTION, ELSET=ESkin_WingGeom_Struct0_0, MATERIAL=EPS30, ORIENTATION=OSkin_WingGeom_Struct0_0
0.002

*ORIENTATION, NAME=OSkin_WingGeom_Struct0_0, SYSTEM=RECTANGULAR
0.000000,1.000000,0.000000,0.0,0.0,1.0

*SHELL SECTION, ELSET=ERibArray_WingGeom_Struct0_0, MATERIAL=EPS30, ORIENTATION=ORibArray_WingGeom_Struct0_0
0.008

*ORIENTATION, NAME=ORibArray_WingGeom_Struct0_0, SYSTEM=RECTANGULAR
1.000000,0.000000,0.000000,0.0,0.0,1.0

*SHELL SECTION, ELSET=ERibArray_WingGeom_Struct0_1, MATERIAL=EPS30, ORIENTATION=ORibArray_WingGeom_Struct0_1
0.008

*ORIENTATION, NAME=ORibArray_WingGeom_Struct0_1, SYSTEM=RECTANGULAR
1.000000,0.000000,0.000000,0.0,0.0,1.0

*SHELL SECTION, ELSET=ERibArray_WingGeom_Struct0_2, MATERIAL=EPS30, ORIENTATION=ORibArray_WingGeom_Struct0_2
0.008

*ORIENTATION, NAME=ORibArray_WingGeom_Struct0_2, SYSTEM=RECTANGULAR
1.000000,0.000000,0.000000,0.0,0.0,1.0

*SHELL SECTION, ELSET=ERibArray_WingGeom_Struct0_3, MATERIAL=EPS30, ORIENTATION=ORibArray_WingGeom_Struct0_3
0.008

*ORIENTATION, NAME=ORibArray_WingGeom_Struct0_3, SYSTEM=RECTANGULAR
1.000000,0.000000,0.000000,0.0,0.0,1.0

*SHELL SECTION, ELSET=ERibArray_WingGeom_Struct0_4, MATERIAL=EPS30, ORIENTATION=ORibArray_WingGeom_Struct0_4
0.008

*ORIENTATION, NAME=ORibArray_WingGeom_Struct0_4, SYSTEM=RECTANGULAR
1.000000,0.000000,0.000000,0.0,0.0,1.0

*SHELL SECTION, ELSET=ERibArray_WingGeom_Struct0_5, MATERIAL=EPS30, ORIENTATION=ORibArray_WingGeom_Struct0_5
0.008

*ORIENTATION, NAME=ORibArray_WingGeom_Struct0_5, SYSTEM=RECTANGULAR
1.000000,0.000000,0.000000,0.0,0.0,1.0

*SHELL SECTION, ELSET=ERibArray_WingGeom_Struct0_6, MATERIAL=EPS30, ORIENTATION=ORibArray_WingGeom_Struct0_6
0.008

*ORIENTATION, NAME=ORibArray_WingGeom_Struct0_6, SYSTEM=RECTANGULAR
1.000000,0.000000,0.000000,0.0,0.0,1.0

*SHELL SECTION, ELSET=ERibArray_WingGeom_Struct0_7, MATERIAL=EPS30, ORIENTATION=ORibArray_WingGeom_Struct0_7
0.008

*ORIENTATION, NAME=ORibArray_WingGeom_Struct0_7, SYSTEM=RECTANGULAR
1.000000,0.000000,0.000000,0.0,0.0,1.0

*SHELL SECTION, ELSET=ERibArray_WingGeom_Struct0_8, MATERIAL=EPS30, ORIENTATION=ORibArray_WingGeom_Struct0_8
0.008

*ORIENTATION, NAME=ORibArray_WingGeom_Struct0_8, SYSTEM=RECTANGULAR
1.000000,0.000000,0.000000,0.0,0.0,1.0

*SHELL SECTION, ELSET=ERibArray_WingGeom_Struct0_9, MATERIAL=EPS30, ORIENTATION=ORibArray_WingGeom_Struct0_9
0.008

*ORIENTATION, NAME=ORibArray_WingGeom_Struct0_9, SYSTEM=RECTANGULAR
1.000000,0.000000,0.000000,0.0,0.0,1.0

*SHELL SECTION, ELSET=ERibArray_WingGeom_Struct0_10, MATERIAL=EPS30, ORIENTATION=ORibArray_WingGeom_Struct0_10
0.008

*ORIENTATION, NAME=ORibArray_WingGeom_Struct0_10, SYSTEM=RECTANGULAR
1.000000,0.000000,0.000000,0.0,0.0,1.0

*SHELL SECTION, ELSET=ERibArray_WingGeom_Struct0_11, MATERIAL=EPS30, ORIENTATION=ORibArray_WingGeom_Struct0_11
0.008

*ORIENTATION, NAME=ORibArray_WingGeom_Struct0_11, SYSTEM=RECTANGULAR
1.000000,0.000000,0.000000,0.0,0.0,1.0

*SHELL SECTION, ELSET=ERibArray_WingGeom_Struct0_12, MATERIAL=EPS30, ORIENTATION=ORibArray_WingGeom_Struct0_12
0.008

*ORIENTATION, NAME=ORibArray_WingGeom_Struct0_12, SYSTEM=RECTANGULAR
1.000000,0.000000,0.000000,0.0,0.0,1.0

*SHELL SECTION, ELSET=ESpar_Front_WingGeom_Struct0_0, MATERIAL=CFRP, ORIENTATION=OSpar_Front_WingGeom_Struct0_0
0.00141

*ORIENTATION, NAME=OSpar_Front_WingGeom_Struct0_0, SYSTEM=RECTANGULAR
0.000000,1.000000,0.000000,0.0,0.0,1.0

*SHELL SECTION, ELSET=ESpar_Rear_WingGeom_Struct0_0, MATERIAL=CFRP, ORIENTATION=OSpar_Rear_WingGeom_Struct0_0
0.00141

*ORIENTATION, NAME=OSpar_Rear_WingGeom_Struct0_0, SYSTEM=RECTANGULAR
0.000000,1.000000,0.000000,0.0,0.0,1.0

*SHELL SECTION, ELSET=ESpar_Upper_WingGeom_Struct0_0, MATERIAL=CFRP, ORIENTATION=OSpar_Upper_WingGeom_Struct0_0
0.00141

*ORIENTATION, NAME=OSpar_Upper_WingGeom_Struct0_0, SYSTEM=RECTANGULAR
0.000000,1.000000,0.000000,0.0,0.0,1.0

*SHELL SECTION, ELSET=ESpar_Lower_WingGeom_Struct0_0, MATERIAL=CFRP, ORIENTATION=OSpar_Lower_WingGeom_Struct0_0
0.00141

*ORIENTATION, NAME=OSpar_Lower_WingGeom_Struct0_0, SYSTEM=RECTANGULAR
0.000000,1.000000,0.000000,0.0,0.0,1.0

*SHELL SECTION, ELSET=ETE_CAP_UPPER_WingGeom_Struct0_0, MATERIAL=Balsa_LTR, ORIENTATION=OTE_CAP_UPPER_WingGeom_Struct0_0
0.001

*ORIENTATION, NAME=OTE_CAP_UPPER_WingGeom_Struct0_0, SYSTEM=RECTANGULAR
0.000000,1.000000,0.000000,0.0,0.0,1.0

*SHELL SECTION, ELSET=ETE_CAP_LOWER_WingGeom_Struct0_0, MATERIAL=Balsa_LTR, ORIENTATION=OTE_CAP_LOWER_WingGeom_Struct0_0
0.001

*ORIENTATION, NAME=OTE_CAP_LOWER_WingGeom_Struct0_0, SYSTEM=RECTANGULAR
0.000000,1.000000,0.000000,0.0,0.0,1.0


** Materials
*MATERIAL, NAME=Balsa_LTR
*DENSITY
160
*ELASTIC, TYPE=ENGINEERING CONSTANTS
3.74e+09, 5.61e+07, 1.7204e+08, 0.488, 0.229, 0.216848, 1.3838e+08, 2.0196e+08
1.87e+07
*EXPANSION, TYPE=ORTHO
0, 0, 0

*MATERIAL, NAME=EPS30
*DENSITY
30
*ELASTIC, TYPE=ISO
7.3e+08, 0.33
*EXPANSION, TYPE=ISO
2.34e-05

*MATERIAL, NAME=CFRP
*DENSITY
1500
*ELASTIC, TYPE=ISO
1.1e+11, 0.33
*EXPANSION, TYPE=ISO
1.3e-05

*ELSET,ELSET=EALL
ESkin_WingGeom_Struct0_0,ERibArray_WingGeom_Struct0_0,ERibArray_WingGeom_Struct0_1,ERibArray_WingGeom_Struct0_2,ERibArray_WingGeom_Struct0_3,ERibArray_WingGeom_Struct0_4,ERibArray_WingGeom_Struct0_5,ERibArray_WingGeom_Struct0_6,ERibArray_WingGeom_Struct0_7,ERibArray_WingGeom_Struct0_8,ERibArray_WingGeom_Struct0_9,ERibArray_WingGeom_Struct0_10,ERibArray_WingGeom_Struct0_11,
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ESpar_Upper_WingGeom_Struct0_0,ESpar_Lower_WingGeom_Struct0_0,ETE_CAP_UPPER_WingGeom_Struct0_0,ETE_CAP_LOWER_WingGeom_Struct0_0,

*STEP
*STATIC
*CLOAD
1210,2,5000
18457,1,-100
18457,2,-5000
18457,3,130
925,1,100
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54760,3,0.01985524
*DLOAD
EALL,GRAV,9.81,0.,0.,-1.
2,P,-32.55773184
3,P,-12.71199744
4,P,-53.63712
5,P,-12.71199744
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30344,P,-12.55108608
*NODE FILE
U
*EL FILE
S,E
*END STEP
